Thu May  4 16:55:36 CEST 2017
;; 1. Based on: 1
;; 2. Description: Test model used in test.R
;; x1. Author: klgk669
$SIZES      NO=1213 LIM1=34004 LIM6=1214
$PROBLEM    6094 PK
;; 4. Date: 01.01.2011

;; 5. Version: 1

;; 6. Label:

;; Basic model

;; 7. Structural model:

;; One compartment model

;; 8. Covariate model:

;; No covariates

;; 9. Inter-individual variability:

;; CL and V1.

;; 10. Inter-occasion variability:

;; No IOV

;; 11. Residual variability:

;; Additive + Proportional

;; 12. Estimation:

;; IMP
$INPUT      ROW=DROP STUDY SUBJID=DROP USUBJID=DROP SITE VISIT=DROP
            CYCLE=DROP DAY PERIOD=DROP FED DAT0=DROP CTIM=DROP ICTIM
            UDTIM=DROP PTAD=DROP TAD=DROP TAFD=DROP AMT IAMT DOSE
            RAT0=DROP REG ROUTE=DROP TYPE DV LNDV=DROP EVID MDV LOQ
            BLOQ=DROP AGE RACE SEX HT=DROP WT IWT=DROP BMI=DROP
            BSA=DROP BWT=DROP BBMI=DROP BBSA=DROP ALB=DROP ALT AST
            BILI CRCL HEPD BALB=DROP BAST=DROP BALT=DROP BBILI=DROP
            BCRCL=DROP BHEPD=DROP ASTLL=DROP ASTUL=DROP ALTLL=DROP
            ALTUL=DROP BILLL=DROP BILUL=DROP TUMOR METS PAT COMB
            COMMENT=DROP ID FREQTXT=DROP DOSETXT=DROP REGTXT=DROP
            TYPETXT=DROP LOWER=DROP UPPER=DROP WDOSE=DROP ORD TAFD2
            AMTLOCF DTAFD=DROP DNUM DOCC1 DOCC2 TIME EXPPRED=DROP
$DATA      data2.csv IGNORE=@ IGNORE=(TYPE.GT.1)
$SUBROUTINE ADVAN2
$PK

TVKA=EXP(THETA(1))
MU_1=LOG(TVKA)
KA = EXP(MU_1+ETA(1))

TVK=EXP(THETA(2))
MU_2=LOG(TVK)
K = EXP(MU_2+ETA(2))

TVV=EXP(THETA(3))
MU_3=LOG(TVV)
V = EXP(MU_3+ETA(3))

TVALAG1 = EXP(THETA(4))
MU_4=LOG(TVALAG1)
ALAG1 = EXP(MU_4 + ETA(4))

CL = K*V

S2 = V/1000

;; DOSE = mg.
;; Vol = L
;; untransformed CONC unit = mg/L
;; want Ng/mL = ug/L
;; so S2 = V/1000

$ERROR

IPRED=F
W=SQRT(THETA(5)**2+THETA(6)**2*IPRED*IPRED)  ; proportional + additive error
IRES=DV-IPRED
IWRES=IRES/W
Y=IPRED+W*EPS(1)

;; TMAX around 2.5 hrs
;; t1/2 = ln(2)/Ka
;; 2.5/4 = ln(2)/Ka
;; ka = 1.1
;; logka = 0.1

;; t1/2 (elim) ~ 4 hrs
;; Ke = 0.17 h-1
;; log(Ke) = -1.75

;; V guess 50L
;; log(V) = 4

;-1.28E-01 -1.53E+00  5.15E+00  1.26E+01  4.77E-01

$THETA  -0.1 ; KA; h-1 ;LOG
 -1.53 ; K; h-1 ;LOG
 5.15 ; V; L ;LOG
 -1.52078 ; ALAG1; h ;LOG
 12.6 ; add error
 0.477 ; prop error
$OMEGA  0.7  ;     IIV_KA  ;        LOG
 0.1  ;      IIV_K  ;        LOG
 0.1  ;      IIV_V  ;        LOG
 0.318196  ;  IIV_ALAG1  ;        LOG
$SIGMA  1  FIX
; Parameter estimation - FOCE
;$ESTIMATION METHOD=1 INTER NOABORT MAXEVAL=9999 PRINT=1 NSIG=3 SIGL=9
; Parameter estimation - IMP
$ESTIMATION METHOD=IMP ISAMPLE=300 NITER=100 RANMETHOD=3S CTYPE=3
            CITER=10 CALPHA=0.05 CINTERVAL=3 PRINT=1 NOABORT
            INTERACTION GRD=DDDDSS
; Parameer estimation - SAEM

;$EST METHOD=SAEM ISAMPLE=2 NBURN=1000 NITER=500

;CTYPE=3 CITER=10 CALPHA=0.05 CINTERVAL=10

;PRINT=1 NOABORT INTERACTION GRD=DDDDSS

; Objective function and covariance evaluation

;$EST METHOD=IMP INTER EONLY= 1 MAPITER=0 ISAMPLE = 2000 NITER = 10 RANMETHOD=3S NOABORT PRINT=1 NSIG=3 SIGL=9 GRD=DDDDSS
$COVARIANCE PRINT=E UNCONDITIONAL SIGL=10
;$SIM (324234) ONLYSIM SUBPR=1
$TABLE      ID TIME IPRED IWRES IRES CWRES NPDE ORD FILE=sdtab2
            NOPRINT ONEHEADER FORMAT=tF13.4
$TABLE      ID CL KA V ; individual parameters
            FILE=patab2 NOPRINT ONEHEADER FORMAT=tF13.4
$TABLE      ID AGE WT CRCL DOCC2 ; continuous covariates
            FILE=cotab2 NOPRINT ONEHEADER FORMAT=tF13.4
$TABLE      ID STUDY SITE DAY DOSE AMTLOCF REG RACE SEX METS ; categorical covariates
            FILE=catab2 NOPRINT ONEHEADER FORMAT=tF13.4

NM-TRAN MESSAGES
 WARNINGS AND ERRORS (IF ANY) FOR PROBLEM    1
 (WARNING  2) NM-TRAN INFERS THAT THE DATA ARE POPULATION.
Note: The following floating-point exceptions are signalling: IEEE_INVALID_FLAG IEEE_DIVIDE_BY_ZERO

1NONLINEAR MIXED EFFECTS MODEL PROGRAM (NONMEM) VERSION 7.3.0
 ORIGINALLY DEVELOPED BY STUART BEAL, LEWIS SHEINER, AND ALISON BOECKMANN
 CURRENT DEVELOPERS ARE ROBERT BAUER, ICON DEVELOPMENT SOLUTIONS,
 AND ALISON BOECKMANN. IMPLEMENTATION, EFFICIENCY, AND STANDARDIZATION
 PERFORMED BY NOUS INFOSYSTEMS.
 PROBLEM NO.:         1
 6094 PK
 TOT. NO. OF OBS RECS:     2237
 TOT. NO. OF INDIVIDUALS:    159
 ONE COMPARTMENT MODEL WITH FIRST-ORDER ABSORPTION (ADVAN2)
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 #TBLN:      1
 #METH: Importance Sampling
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
 #TERM:
 OPTIMIZATION WAS NOT COMPLETED

 ETABAR IS THE ARITHMETIC MEAN OF THE ETA-ESTIMATES,
 AND THE P-VALUE IS GIVEN FOR THE NULL HYPOTHESIS THAT THE TRUE MEAN IS 0.

 ETABAR:         1.7959E-02 -1.2157E-03  6.6806E-04  4.4935E-03
 SE:             6.1460E-02  2.9561E-02  1.8586E-02  2.9852E-02
 N:                     159         159         159         159

 P VAL.:         7.7013E-01  9.6720E-01  9.7133E-01  8.8035E-01

 ETAshrink(%):   2.6225E+01  1.7027E+01  2.7166E+01  3.6417E+01
 EBVshrink(%):   2.7551E+01  1.8839E+01  2.7498E+01  3.6706E+01
 EPSshrink(%):   6.2802E+00

 #TERE:
 Elapsed estimation time in seconds:   380.38
 Elapsed covariance time in seconds:    15.66

 ********************                               IMPORTANCE SAMPLING                              ********************
 #OBJT:**************                        FINAL VALUE OF OBJECTIVE FUNCTION                       ********************
 #OBJV:********************************************    27743.628       **************************************************

 ********************                               IMPORTANCE SAMPLING                              ********************
 ********************                             FINAL PARAMETER ESTIMATE                           ********************

 THETA - VECTOR OF FIXED EFFECTS PARAMETERS   *********
         TH 1      TH 2      TH 3      TH 4      TH 5      TH 6
         5.62E-01 -1.72E+00  5.24E+00 -1.63E+00  1.32E+01  4.55E-01

 OMEGA - COV MATRIX FOR RANDOM EFFECTS - ETAS  ********
            ETA1      ETA2      ETA3      ETA4
 ETA1
+        1.11E+00
 ETA2
+        0.00E+00  2.03E-01
 ETA3
+        0.00E+00  0.00E+00  1.04E-01
 ETA4
+        0.00E+00  0.00E+00  0.00E+00  3.53E-01

 SIGMA - COV MATRIX FOR RANDOM EFFECTS - EPSILONS  ****
            EPS1
 EPS1
+        1.00E+00

 OMEGA - CORR MATRIX FOR RANDOM EFFECTS - ETAS  *******
            ETA1      ETA2      ETA3      ETA4
 ETA1
+        1.05E+00
 ETA2
+        0.00E+00  4.51E-01
 ETA3
+        0.00E+00  0.00E+00  3.23E-01
 ETA4
+        0.00E+00  0.00E+00  0.00E+00  5.94E-01

 SIGMA - CORR MATRIX FOR RANDOM EFFECTS - EPSILONS  ***
            EPS1
 EPS1
+        1.00E+00

 ********************                               IMPORTANCE SAMPLING                              ********************
 ********************                         STANDARD ERROR OF ESTIMATE (RSR)                       ********************

 THETA - VECTOR OF FIXED EFFECTS PARAMETERS   *********
         TH 1      TH 2      TH 3      TH 4      TH 5      TH 6
         1.18E-01  5.19E-02  4.61E-02  9.35E-02  4.91E+00  1.90E-02

 OMEGA - COV MATRIX FOR RANDOM EFFECTS - ETAS  ********
            ETA1      ETA2      ETA3      ETA4
 ETA1
+        2.82E-01
 ETA2
+        0.00E+00  3.57E-02
 ETA3
+        0.00E+00  0.00E+00  1.67E-02
 ETA4
+        0.00E+00  0.00E+00  0.00E+00  1.35E-01

 SIGMA - COV MATRIX FOR RANDOM EFFECTS - EPSILONS  ****
            EPS1
 EPS1
+        0.00E+00

 OMEGA - CORR MATRIX FOR RANDOM EFFECTS - ETAS  *******
            ETA1      ETA2      ETA3      ETA4
 ETA1
+        1.34E-01
 ETA2
+       .........  3.96E-02
 ETA3
+       ......... .........  2.58E-02
 ETA4
+       ......... ......... .........  1.14E-01

 SIGMA - CORR MATRIX FOR RANDOM EFFECTS - EPSILONS  ***
            EPS1
 EPS1
+       .........
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
 ********************                               IMPORTANCE SAMPLING                              ********************
 ********************                   EIGENVALUES OF COR MATRIX OF ESTIMATE (RSR)                  ********************

             1         2         3         4         5         6         7         8         9        10
         1.48E-01  2.48E-01  3.81E-01  3.90E-01  7.41E-01  8.50E-01  1.19E+00  1.24E+00  1.50E+00  3.31E+00
 #CPUT: Total CPU Time in Seconds,     4858.260
