Sun Mar 15 09:56:03 UTC 2020
;; 1. Based on: NA
;; 2. Description: 1CMT+oral
;; x1. Author: klgk669
$PROBLEM    THEOPP example
;; 4. Date: 01.01.2011

;; 5. Version: 1

;; 6. Label:

;; Basic model

;; 7. Structural model:

;; One compartment model

;; 8. Covariate model:

;; No covariates

;; 9. Inter-individual variability:

;; CL and V1.

;; 10. Inter-occasion variability:

;; No IOV

;; 11. Residual variability:

;; Additive + Proportional

;; 12. Estimation:

;; IMP
$INPUT      ID AMT TIME DV WT
$DATA      THEOPP.csv IGNORE=@
$SUBROUTINE ADVAN2
$PK

TVKA=EXP(THETA(1))
MU_1=LOG(TVKA)
KA = EXP(MU_1+ETA(1))

TVK=EXP(THETA(2))
MU_2=LOG(TVK)
K = EXP(MU_2+ETA(2))

TVV=EXP(THETA(3))
MU_3=LOG(TVV)
V = EXP(MU_3+ETA(3))

CL = K*V

S2 = V

$ERROR

IPRED=F
W=SQRT(THETA(4)**2+THETA(5)**2*IPRED*IPRED)  ; proportional + additive error
IRES=DV-IPRED
IWRES=IRES/W
Y=IPRED+W*EPS(1)

$THETA  1 ; KA; h-1 ;LOG
 -2.5 ; K; h-1 ;LOG
 -0.5 ; V; L ;LOG
 0.1 ; add error
 0.1 ; prop error
$OMEGA  0.1  ;     IIV_KA  ;        LOG
 0.1  ;      IIV_K  ;        LOG
 0.1  ;      IIV_V  ;        LOG
$SIGMA  1  FIX
; Parameter estimation - FOCE
$ESTIMATION METHOD=1 INTER NOABORT MAXEVAL=9999 PRINT=1 NSIG=3 SIGL=9
; Parameter estimation - IMP

;$EST METHOD=IMP ISAMPLE=300 NITER=300 RANMETHOD=3S2P

;CTYPE=3 CITER=10 CALPHA=0.05 CINTERVAL=3

;PRINT=1 NOABORT INTERACTION GRD=DDDSS

; Parameer estimation - SAEM

;$EST METHOD=SAEM ISAMPLE=2 NBURN=1000 NITER=500 RANMETHOD=3S2P

;CTYPE=3 CITER=10 CALPHA=0.05 CINTERVAL=10

;PRINT=1 NOABORT INTERACTION GRD=DDDSS

; Objective function and covariance evaluation

;$EST METHOD=IMP INTER EONLY= 1 MAPITER=0 ISAMPLE = 2000 NITER = 10 RANMETHOD=3S2P NOABORT PRINT=1 NSIG=3 SIGL=9 GRD=DDDSS
$COVARIANCE PRINT=E UNCONDITIONAL SIGL=10
$TABLE      ID TIME IPRED IWRES IRES CWRES NPDE FILE=sdtabm1 NOPRINT
            ONEHEADER FORMAT=tF13.4
$TABLE      ID ETAS(1:LAST) ; individual parameters
            FILE=patabm1 NOPRINT ONEHEADER FORMAT=tF13.4
$TABLE      ID ; continuous covariates
            FILE=cotabm1 NOPRINT ONEHEADER FORMAT=tF13.4
$TABLE      ID ; categorical covariates
            FILE=catabm1 NOPRINT ONEHEADER FORMAT=tF13.4

NM-TRAN MESSAGES
 WARNINGS AND ERRORS (IF ANY) FOR PROBLEM    1
 (WARNING  2) NM-TRAN INFERS THAT THE DATA ARE POPULATION.
Note: The following floating-point exceptions are signalling: IEEE_INVALID_FLAG IEEE_DIVIDE_BY_ZERO

1NONLINEAR MIXED EFFECTS MODEL PROGRAM (NONMEM) VERSION 7.3.0
 ORIGINALLY DEVELOPED BY STUART BEAL, LEWIS SHEINER, AND ALISON BOECKMANN
 CURRENT DEVELOPERS ARE ROBERT BAUER, ICON DEVELOPMENT SOLUTIONS,
 AND ALISON BOECKMANN. IMPLEMENTATION, EFFICIENCY, AND STANDARDIZATION
 PERFORMED BY NOUS INFOSYSTEMS.
 PROBLEM NO.:         1
 THEOPP example
 TOT. NO. OF OBS RECS:      132
 TOT. NO. OF INDIVIDUALS:     12
 ONE COMPARTMENT MODEL WITH FIRST-ORDER ABSORPTION (ADVAN2)
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 #TBLN:      1
 #METH: First Order Conditional Estimation with Interaction
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
 #TERM:
0MINIMIZATION SUCCESSFUL
 NO. OF FUNCTION EVALUATIONS USED:      192
 NO. OF SIG. DIGITS IN FINAL EST.:  3.2

 ETABAR IS THE ARITHMETIC MEAN OF THE ETA-ESTIMATES,
 AND THE P-VALUE IS GIVEN FOR THE NULL HYPOTHESIS THAT THE TRUE MEAN IS 0.

 ETABAR:        -1.2251E-02  4.4856E-03 -3.9874E-03
 SE:             1.7828E-01  3.8062E-02  3.5899E-02
 N:                      12          12          12

 P VAL.:         9.4521E-01  9.0619E-01  9.1156E-01

 ETAshrink(%):   1.6952E+00  1.6389E+01  8.1298E+00
 EBVshrink(%):   3.9782E+00  1.9681E+01  1.2059E+01
 EPSshrink(%):   1.0862E+01

 #TERE:
 Elapsed estimation time in seconds:     0.27
 Elapsed covariance time in seconds:     0.25

 ********************               FIRST ORDER CONDITIONAL ESTIMATION WITH INTERACTION              ********************
 #OBJT:**************                       MINIMUM VALUE OF OBJECTIVE FUNCTION                      ********************
 #OBJV:********************************************       96.800       **************************************************

 ********************               FIRST ORDER CONDITIONAL ESTIMATION WITH INTERACTION              ********************
 ********************                             FINAL PARAMETER ESTIMATE                           ********************

 THETA - VECTOR OF FIXED EFFECTS PARAMETERS   *********
         TH 1      TH 2      TH 3      TH 4      TH 5
         4.00E-01 -2.44E+00 -7.68E-01  2.77E-01  1.30E-01

 OMEGA - COV MATRIX FOR RANDOM EFFECTS - ETAS  ********
            ETA1      ETA2      ETA3
 ETA1
+        4.31E-01
 ETA2
+        0.00E+00  2.71E-02
 ETA3
+        0.00E+00  0.00E+00  2.00E-02

 SIGMA - COV MATRIX FOR RANDOM EFFECTS - EPSILONS  ****
            EPS1
 EPS1
+        1.00E+00

 OMEGA - CORR MATRIX FOR RANDOM EFFECTS - ETAS  *******
            ETA1      ETA2      ETA3
 ETA1
+        6.56E-01
 ETA2
+        0.00E+00  1.65E-01
 ETA3
+        0.00E+00  0.00E+00  1.41E-01

 SIGMA - CORR MATRIX FOR RANDOM EFFECTS - EPSILONS  ***
            EPS1
 EPS1
+        1.00E+00

 ********************               FIRST ORDER CONDITIONAL ESTIMATION WITH INTERACTION              ********************
 ********************                            STANDARD ERROR OF ESTIMATE                          ********************

 THETA - VECTOR OF FIXED EFFECTS PARAMETERS   *********
         TH 1      TH 2      TH 3      TH 4      TH 5
         2.04E-01  5.21E-02  4.32E-02  1.79E-01  4.10E-02

 OMEGA - COV MATRIX FOR RANDOM EFFECTS - ETAS  ********
            ETA1      ETA2      ETA3
 ETA1
+        2.34E-01
 ETA2
+       .........  2.27E-02
 ETA3
+       ......... .........  6.44E-03

 SIGMA - COV MATRIX FOR RANDOM EFFECTS - EPSILONS  ****
            EPS1
 EPS1
+       .........

 OMEGA - CORR MATRIX FOR RANDOM EFFECTS - ETAS  *******
            ETA1      ETA2      ETA3
 ETA1
+        1.78E-01
 ETA2
+       .........  6.89E-02
 ETA3
+       ......... .........  2.28E-02

 SIGMA - CORR MATRIX FOR RANDOM EFFECTS - EPSILONS  ***
            EPS1
 EPS1
+       .........

 ********************               FIRST ORDER CONDITIONAL ESTIMATION WITH INTERACTION              ********************
 ********************                          COVARIANCE MATRIX OF ESTIMATE                         ********************

            TH 1      TH 2      TH 3      TH 4      TH 5      OM11      OM12      OM13      OM22      OM23      OM33      SG11
 TH 1
+        4.15E-02
 TH 2
+       -2.08E-03  2.72E-03
 TH 3
+       -5.74E-04  1.07E-03  1.87E-03
 TH 4
+       -3.06E-03 -7.26E-03 -4.55E-03  3.20E-02
 TH 5
+       -5.55E-04  1.49E-03  7.64E-04 -6.37E-03  1.68E-03
 OM11
+        3.00E-02  5.34E-04 -2.12E-03 -7.30E-03 -1.14E-03  5.48E-02
 OM12
+       ......... ......... ......... ......... ......... ......... .........
 OM13
+       ......... ......... ......... ......... ......... ......... ......... .........
 OM22
+        3.11E-05 -9.86E-04 -5.21E-04  3.85E-03 -6.73E-04 -1.35E-03 ......... .........  5.16E-04
 OM23
+       ......... ......... ......... ......... ......... ......... ......... ......... ......... .........
 OM33
+        8.20E-04 -1.22E-04  1.74E-05  3.88E-04 -1.24E-04  6.86E-04 ......... .........  5.24E-05 .........  4.15E-05
 SG11
+       ......... ......... ......... ......... ......... ......... ......... ......... ......... ......... ......... .........

 ********************               FIRST ORDER CONDITIONAL ESTIMATION WITH INTERACTION              ********************
 ********************                          CORRELATION MATRIX OF ESTIMATE                        ********************

            TH 1      TH 2      TH 3      TH 4      TH 5      OM11      OM12      OM13      OM22      OM23      OM33      SG11
 TH 1
+        2.04E-01
 TH 2
+       -1.96E-01  5.21E-02
 TH 3
+       -6.52E-02  4.75E-01  4.32E-02
 TH 4
+       -8.38E-02 -7.78E-01 -5.88E-01  1.79E-01
 TH 5
+       -6.63E-02  6.96E-01  4.31E-01 -8.69E-01  4.10E-02
 OM11
+        6.30E-01  4.37E-02 -2.09E-01 -1.74E-01 -1.19E-01  2.34E-01
 OM12
+       ......... ......... ......... ......... ......... ......... .........
 OM13
+       ......... ......... ......... ......... ......... ......... ......... .........
 OM22
+        6.72E-03 -8.32E-01 -5.30E-01  9.46E-01 -7.23E-01 -2.54E-01 ......... .........  2.27E-02
 OM23
+       ......... ......... ......... ......... ......... ......... ......... ......... ......... .........
 OM33
+        6.25E-01 -3.64E-01  6.23E-02  3.37E-01 -4.69E-01  4.55E-01 ......... .........  3.58E-01 .........  6.44E-03
 SG11
+       ......... ......... ......... ......... ......... ......... ......... ......... ......... ......... ......... .........
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
 ********************               FIRST ORDER CONDITIONAL ESTIMATION WITH INTERACTION              ********************
 ********************                      EIGENVALUES OF COR MATRIX OF ESTIMATE                     ********************

             1         2         3         4         5         6         7         8
         4.41E-03  3.87E-02  1.49E-01  2.48E-01  5.07E-01  9.56E-01  2.11E+00  3.98E+00
 #CPUT: Total CPU Time in Seconds,        0.609
