Sat Apr 11 15:14:13 UTC 2020
;; 1. Based on: m1
;; 2. Description: 1CMT+oral
;; x1. Author: klgk669
$PROBLEM    THEOPP example
;; 4. Date: 01.01.2011

;; 5. Version: 1

;; 6. Label:

;; Basic model

;; 7. Structural model:

;; One compartment model

;; 8. Covariate model:

;; No covariates

;; 9. Inter-individual variability:

;; CL and V1.

;; 10. Inter-occasion variability:

;; No IOV

;; 11. Residual variability:

;; Additive + Proportional

;; 12. Estimation:

;; IMP
$INPUT      ID AMT TIME DV WT
$DATA      THEOPP.csv IGNORE=@
$SUBROUTINE ADVAN4 TRANS1
$PK

TVKA=EXP(THETA(1))
MU_1=LOG(TVKA)
KA = EXP(MU_1+ETA(1))

TVK=EXP(THETA(2))
MU_2=LOG(TVK)
K = EXP(MU_2+ETA(2))

TVV2=EXP(THETA(3))
MU_3=LOG(TVV2)
V2 = EXP(MU_3+ETA(3))

CL = K*V2

S2 = V2

TVK23=EXP(THETA(6))
            MU_4=LOG(TVK23)
            K23 = EXP(MU_4+ETA(4))

TVK32=EXP(THETA(7))
            MU_5=LOG(TVK32)
            K32 = EXP(MU_5+ETA(5))

$ERROR

IPRED=F
W=SQRT(THETA(4)**2+THETA(5)**2*IPRED*IPRED)  ; proportional + additive error
IRES=DV-IPRED
IWRES=IRES/W
Y=IPRED+W*EPS(1)

$THETA  1 ; KA; h-1 ;LOG
 -2.5 ; K; h-1 ;LOG
 -0.5 ; V2; L ;LOG
 0.1 ; add error
 0.1 ; prop error
 0.095 ; TVK23; ;LOG
 0.095 ; TVK32; ;LOG
$OMEGA  0.1  ;     IIV_KA  ;        LOG
 0.1  ;      IIV_K  ;        LOG
 0.1  ;     IIV_V2  ;        LOG
 0.1  ;    IIV_K23  ;        LOG
 0.1  ;    IIV_K32  ;        LOG
$SIGMA  1  FIX
; Parameter estimation - FOCE
$ESTIMATION METHOD=1 INTER NOABORT MAXEVAL=9999 PRINT=1 NSIG=3 SIGL=9
; Parameter estimation - IMP

;$EST METHOD=IMP ISAMPLE=300 NITER=300 RANMETHOD=3S2P

;CTYPE=3 CITER=10 CALPHA=0.05 CINTERVAL=3

;PRINT=1 NOABORT INTERACTION GRD=DDDSS

; Parameer estimation - SAEM

;$EST METHOD=SAEM ISAMPLE=2 NBURN=1000 NITER=500 RANMETHOD=3S2P

;CTYPE=3 CITER=10 CALPHA=0.05 CINTERVAL=10

;PRINT=1 NOABORT INTERACTION GRD=DDDSS

; Objective function and covariance evaluation

;$EST METHOD=IMP INTER EONLY= 1 MAPITER=0 ISAMPLE = 2000 NITER = 10 RANMETHOD=3S2P NOABORT PRINT=1 NSIG=3 SIGL=9 GRD=DDDSS
$COVARIANCE PRINT=E UNCONDITIONAL SIGL=10
$TABLE      ID TIME IPRED IWRES IRES CWRES NPDE FILE=sdtabm2 NOPRINT
            ONEHEADER FORMAT=tF13.4
$TABLE      ID ETAS(1:LAST) ; individual parameters
            FILE=patabm2 NOPRINT ONEHEADER FORMAT=tF13.4
$TABLE      ID ; continuous covariates
            FILE=cotabm2 NOPRINT ONEHEADER FORMAT=tF13.4
$TABLE      ID ; categorical covariates
            FILE=catabm2 NOPRINT ONEHEADER FORMAT=tF13.4

NM-TRAN MESSAGES
 WARNINGS AND ERRORS (IF ANY) FOR PROBLEM    1
 (WARNING  2) NM-TRAN INFERS THAT THE DATA ARE POPULATION.
Note: The following floating-point exceptions are signalling: IEEE_INVALID_FLAG IEEE_DIVIDE_BY_ZERO

1NONLINEAR MIXED EFFECTS MODEL PROGRAM (NONMEM) VERSION 7.3.0
 ORIGINALLY DEVELOPED BY STUART BEAL, LEWIS SHEINER, AND ALISON BOECKMANN
 CURRENT DEVELOPERS ARE ROBERT BAUER, ICON DEVELOPMENT SOLUTIONS,
 AND ALISON BOECKMANN. IMPLEMENTATION, EFFICIENCY, AND STANDARDIZATION
 PERFORMED BY NOUS INFOSYSTEMS.
 PROBLEM NO.:         1
 THEOPP example
 TOT. NO. OF OBS RECS:      132
 TOT. NO. OF INDIVIDUALS:     12
 TWO COMPARTMENT MODEL WITH FIRST-ORDER ABSORPTION (ADVAN4)
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 #TBLN:      1
 #METH: First Order Conditional Estimation with Interaction
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
 #TERM:
0MINIMIZATION SUCCESSFUL
 NO. OF FUNCTION EVALUATIONS USED:      504
 NO. OF SIG. DIGITS IN FINAL EST.:  3.3
0PARAMETER ESTIMATE IS NEAR ITS BOUNDARY

 ETABAR IS THE ARITHMETIC MEAN OF THE ETA-ESTIMATES,
 AND THE P-VALUE IS GIVEN FOR THE NULL HYPOTHESIS THAT THE TRUE MEAN IS 0.

 ETABAR:        -9.2210E-03  4.2867E-03 -3.8263E-03 -1.0376E-07  9.2350E-08
 SE:             1.7236E-01  3.8143E-02  3.5059E-02  1.7908E-06  1.5607E-06
 N:                      12          12          12          12          12

 P VAL.:         9.5733E-01  9.1052E-01  9.1309E-01  9.5379E-01  9.5281E-01

 ETAshrink(%):   7.4513E-01  1.7671E+01  8.7282E+00  9.9795E+01  9.9821E+01
 EBVshrink(%):   3.4669E+00  2.0877E+01  1.2606E+01  9.9688E+01  9.9685E+01
 EPSshrink(%):   1.0849E+01

 #TERE:
 Elapsed estimation time in seconds:     1.12
0R MATRIX ALGORITHMICALLY SINGULAR
0COVARIANCE MATRIX UNOBTAINABLE
0R MATRIX IS OUTPUT
0S MATRIX ALGORITHMICALLY SINGULAR
0S MATRIX IS OUTPUT
0T MATRIX - EQUAL TO RS*RMAT, WHERE S* IS A PSEUDO INVERSE OF S - IS OUTPUT
 Elapsed covariance time in seconds:     0.79

 ********************               FIRST ORDER CONDITIONAL ESTIMATION WITH INTERACTION              ********************
 #OBJT:**************                       MINIMUM VALUE OF OBJECTIVE FUNCTION                      ********************
 #OBJV:********************************************       94.060       **************************************************

 ********************               FIRST ORDER CONDITIONAL ESTIMATION WITH INTERACTION              ********************
 ********************                             FINAL PARAMETER ESTIMATE                           ********************

 THETA - VECTOR OF FIXED EFFECTS PARAMETERS   *********
         TH 1      TH 2      TH 3      TH 4      TH 5      TH 6      TH 7
         2.27E-01 -2.31E+00 -9.13E-01  3.05E-01  1.22E-01 -2.42E+00 -6.39E-01

 OMEGA - COV MATRIX FOR RANDOM EFFECTS - ETAS  ********
            ETA1      ETA2      ETA3      ETA4      ETA5
 ETA1
+        3.95E-01
 ETA2
+        0.00E+00  2.81E-02
 ETA3
+        0.00E+00  0.00E+00  1.93E-02
 ETA4
+        0.00E+00  0.00E+00  0.00E+00  1.00E-05
 ETA5
+        0.00E+00  0.00E+00  0.00E+00  0.00E+00  1.00E-05

 SIGMA - COV MATRIX FOR RANDOM EFFECTS - EPSILONS  ****
            EPS1
 EPS1
+        1.00E+00

 OMEGA - CORR MATRIX FOR RANDOM EFFECTS - ETAS  *******
            ETA1      ETA2      ETA3      ETA4      ETA5
 ETA1
+        6.28E-01
 ETA2
+        0.00E+00  1.68E-01
 ETA3
+        0.00E+00  0.00E+00  1.39E-01
 ETA4
+        0.00E+00  0.00E+00  0.00E+00  3.16E-03
 ETA5
+        0.00E+00  0.00E+00  0.00E+00  0.00E+00  3.16E-03

 SIGMA - CORR MATRIX FOR RANDOM EFFECTS - EPSILONS  ***
            EPS1
 EPS1
+        1.00E+00
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 #CPUT: Total CPU Time in Seconds,        2.080
