Sat Sep  1 17:38:27 UTC 2018
;; 1. Based on:
;; 2. Description: 1CMT+oral
;; x1. Author: klgk669
$PROBLEM    THEOPP example
;; 4. Date: 01.01.2011

;; 5. Version: 1

;; 6. Label:

;; Basic model

;; 7. Structural model:

;; One compartment model

;; 8. Covariate model:

;; No covariates

;; 9. Inter-individual variability:

;; CL and V1.

;; 10. Inter-occasion variability:

;; No IOV

;; 11. Residual variability:

;; Additive + Proportional

;; 12. Estimation:

;; IMP
$INPUT      ID AMT TIME DV WT
$DATA      THEOPP.csv IGNORE=@
$SUBROUTINE ADVAN2
$PK

TVKA=EXP(THETA(1))
MU_1=LOG(TVKA)
KA = EXP(MU_1+ETA(1))

TVK=EXP(THETA(2))
MU_2=LOG(TVK)
K = EXP(MU_2+ETA(2))

TVV=EXP(THETA(3))
MU_3=LOG(TVV)
V = EXP(MU_3+ETA(3))

CL = K*V

S2 = V

$ERROR

IPRED=F
W=SQRT(THETA(4)**2+THETA(5)**2*IPRED*IPRED)  ; proportional + additive error
IRES=DV-IPRED
IWRES=IRES/W
Y=IPRED+W*EPS(1)

$THETA  1 ; KA; h-1 ;LOG
 -2.5 ; K; h-1 ;LOG
 -0.5 ; V; L ;LOG
 0.1 ; add error
 0.1 ; prop error
$OMEGA  0.1  ;     IIV_KA  ;        LOG
 0.1  ;      IIV_K  ;        LOG
 0.1  ;      IIV_V  ;        LOG
$SIGMA  1  FIX
; Parameter estimation - FOCE
;$EST METHOD=1 INTER NOABORT MAXEVAL=9999 PRINT=1 NSIG=3 SIGL=9
; Parameter estimation - IMP
$ESTIMATION METHOD=IMP ISAMPLE=300 NITER=300 RANMETHOD=3S2 CTYPE=3
            CITER=10 CALPHA=0.05 CINTERVAL=3 PRINT=1 NOABORT
            INTERACTION GRD=DDDSS
; Parameer estimation - SAEM

;$EST METHOD=SAEM ISAMPLE=2 NBURN=1000 NITER=500 RANMETHOD=3S2

;CTYPE=3 CITER=10 CALPHA=0.05 CINTERVAL=10

;PRINT=1 NOABORT INTERACTION GRD=DDDSS

; Objective function and covariance evaluation
$ESTIMATION METHOD=IMP INTER EONLY=1 MAPITER=0 ISAMPLE=2000 NITER=10
            RANMETHOD=3S2 NOABORT PRINT=1 NSIG=3 SIGL=9 GRD=DDDSS
$COVARIANCE PRINT=E UNCONDITIONAL SIGL=10
$TABLE      ID TIME IPRED IWRES IRES CWRES NPDE FILE=sdtab1 NOPRINT
            ONEHEADER FORMAT=tF13.4
$TABLE      ID ETAS(1:LAST) ; individual parameters
            FILE=patab1 NOPRINT ONEHEADER FORMAT=tF13.4
$TABLE      ID ; continuous covariates
            FILE=cotab1 NOPRINT ONEHEADER FORMAT=tF13.4
$TABLE      ID ; categorical covariates
            FILE=catab1 NOPRINT ONEHEADER FORMAT=tF13.4

NM-TRAN MESSAGES
 WARNINGS AND ERRORS (IF ANY) FOR PROBLEM    1
 (WARNING  2) NM-TRAN INFERS THAT THE DATA ARE POPULATION.

1NONLINEAR MIXED EFFECTS MODEL PROGRAM (NONMEM) VERSION 7.4.3
 ORIGINALLY DEVELOPED BY STUART BEAL, LEWIS SHEINER, AND ALISON BOECKMANN
 CURRENT DEVELOPERS ARE ROBERT BAUER, ICON DEVELOPMENT SOLUTIONS,
 AND ALISON BOECKMANN. IMPLEMENTATION, EFFICIENCY, AND STANDARDIZATION
 PERFORMED BY NOUS INFOSYSTEMS.
 PROBLEM NO.:         1
 THEOPP example
 TOT. NO. OF OBS RECS:      132
 TOT. NO. OF INDIVIDUALS:       12
 ONE COMPARTMENT MODEL WITH FIRST-ORDER ABSORPTION (ADVAN2)
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 #TBLN:      1
 #METH: Importance Sampling
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
 #TERM:
 OPTIMIZATION WAS COMPLETED

 ETABAR IS THE ARITHMETIC MEAN OF THE ETA-ESTIMATES,
 AND THE P-VALUE IS GIVEN FOR THE NULL HYPOTHESIS THAT THE TRUE MEAN IS 0.

 ETABAR:         4.9896E-04 -5.4537E-05 -4.0232E-06
 SE:             1.8717E-01  3.9485E-02  3.5827E-02
 N:                      12          12          12

 P VAL.:         9.9787E-01  9.9890E-01  9.9991E-01

 ETASHRINKSD(%)  3.3835E+00  1.7893E+01  1.1895E+01
 ETASHRINKVR(%)  6.6525E+00  3.2585E+01  2.2376E+01
 EBVSHRINKSD(%)  3.5925E+00  1.7882E+01  1.1657E+01
 EBVSHRINKVR(%)  7.0558E+00  3.2567E+01  2.1954E+01
 EPSSHRINKSD(%)  1.1678E+01
 EPSSHRINKVR(%)  2.1992E+01


 TOTAL DATA POINTS NORMALLY DISTRIBUTED (N):          132
 N*LOG(2PI) CONSTANT TO OBJECTIVE FUNCTION:    242.59977276603360
 OBJECTIVE FUNCTION VALUE WITHOUT CONSTANT:    97.390382724251623
 OBJECTIVE FUNCTION VALUE WITH CONSTANT:       339.99015549028525
 REPORTED OBJECTIVE FUNCTION DOES NOT CONTAIN CONSTANT

 TOTAL EFFECTIVE ETAS (NIND*NETA):                            36


 #TERE:
 Elapsed estimation  time in seconds:     9.01
 Elapsed covariance  time in seconds:     0.48

 ********************                               IMPORTANCE SAMPLING                              ********************
 #OBJT:**************                        FINAL VALUE OF OBJECTIVE FUNCTION                       ********************
 #OBJV:********************************************       97.390       **************************************************

 ********************                               IMPORTANCE SAMPLING                              ********************
 ********************                             FINAL PARAMETER ESTIMATE                           ********************

 THETA - VECTOR OF FIXED EFFECTS PARAMETERS   *********
         TH 1      TH 2      TH 3      TH 4      TH 5
         4.15E-01 -2.44E+00 -7.73E-01  2.62E-01  1.33E-01

 OMEGA - COV MATRIX FOR RANDOM EFFECTS - ETAS  ********
         ETA1      ETA2      ETA3
 ETA1
+        4.91E-01
 ETA2
+        0.00E+00  3.03E-02
 ETA3
+        0.00E+00  0.00E+00  2.16E-02

 SIGMA - COV MATRIX FOR RANDOM EFFECTS - EPSILONS  ****
         EPS1
 EPS1
+        1.00E+00

 OMEGA - CORR MATRIX FOR RANDOM EFFECTS - ETAS  *******
         ETA1      ETA2      ETA3
 ETA1
+        7.01E-01
 ETA2
+        0.00E+00  1.74E-01
 ETA3
+        0.00E+00  0.00E+00  1.47E-01

 SIGMA - CORR MATRIX FOR RANDOM EFFECTS - EPSILONS  ***
         EPS1
 EPS1
+        1.00E+00

 ********************                               IMPORTANCE SAMPLING                              ********************
 ********************                         STANDARD ERROR OF ESTIMATE (RSR)                       ********************

 THETA - VECTOR OF FIXED EFFECTS PARAMETERS   *********
         TH 1      TH 2      TH 3      TH 4      TH 5
         2.02E-01  4.70E-02  4.24E-02  1.44E-01  3.52E-02

 OMEGA - COV MATRIX FOR RANDOM EFFECTS - ETAS  ********
         ETA1      ETA2      ETA3
 ETA1
+        2.53E-01
 ETA2
+        0.00E+00  1.12E-02
 ETA3
+        0.00E+00  0.00E+00  7.77E-03

 SIGMA - COV MATRIX FOR RANDOM EFFECTS - EPSILONS  ****
         EPS1
 EPS1
+        0.00E+00

 OMEGA - CORR MATRIX FOR RANDOM EFFECTS - ETAS  *******
         ETA1      ETA2      ETA3
 ETA1
+        1.81E-01
 ETA2
+       .........  3.22E-02
 ETA3
+       ......... .........  2.64E-02

 SIGMA - CORR MATRIX FOR RANDOM EFFECTS - EPSILONS  ***
         EPS1
 EPS1
+       .........

 ********************                               IMPORTANCE SAMPLING                              ********************
 ********************                       COVARIANCE MATRIX OF ESTIMATE (RSR)                      ********************

            TH 1      TH 2      TH 3      TH 4      TH 5      OM11      OM12      OM13      OM22      OM23      OM33      SG11
 TH 1
+        4.10E-02
 TH 2
+       -1.76E-03  2.21E-03
 TH 3
+       -1.31E-04  8.76E-04  1.80E-03
 TH 4
+       -3.53E-03 -4.98E-03 -3.52E-03  2.07E-02
 TH 5
+       -9.62E-05  1.02E-03  5.52E-04 -4.21E-03  1.24E-03
 OM11
+        3.08E-02  2.27E-04 -2.28E-03 -4.48E-03 -1.27E-03  6.41E-02
 OM12
+       ......... ......... ......... ......... ......... ......... .........
 OM13
+       ......... ......... ......... ......... ......... ......... ......... .........
 OM22
+       -5.33E-04 -3.39E-04 -2.08E-04  1.24E-03 -1.43E-04 -1.51E-03  0.00E+00  0.00E+00  1.26E-04
 OM23
+       ......... ......... ......... ......... ......... ......... ......... ......... ......... .........
 OM33
+        1.04E-03  1.97E-05  8.75E-05 -1.35E-04 -3.43E-05  1.41E-03  0.00E+00  0.00E+00 -4.25E-05  0.00E+00  6.04E-05
 SG11
+       ......... ......... ......... ......... ......... ......... ......... ......... ......... ......... ......... .........

 ********************                               IMPORTANCE SAMPLING                              ********************
 ********************                       CORRELATION MATRIX OF ESTIMATE (RSR)                     ********************

            TH 1      TH 2      TH 3      TH 4      TH 5      OM11      OM12      OM13      OM22      OM23      OM33      SG11
 TH 1
+        2.02E-01
 TH 2
+       -1.85E-01  4.70E-02
 TH 3
+       -1.52E-02  4.39E-01  4.24E-02
 TH 4
+       -1.21E-01 -7.37E-01 -5.77E-01  1.44E-01
 TH 5
+       -1.35E-02  6.17E-01  3.69E-01 -8.33E-01  3.52E-02
 OM11
+        6.02E-01  1.91E-02 -2.12E-01 -1.23E-01 -1.43E-01  2.53E-01
 OM12
+       ......... ......... ......... ......... ......... ......... .........
 OM13
+       ......... ......... ......... ......... ......... ......... ......... .........
 OM22
+       -2.35E-01 -6.43E-01 -4.37E-01  7.70E-01 -3.63E-01 -5.33E-01  0.00E+00  0.00E+00  1.12E-02
 OM23
+       ......... ......... ......... ......... ......... ......... ......... ......... ......... .........
 OM33
+        6.62E-01  5.38E-02  2.65E-01 -1.21E-01 -1.25E-01  7.17E-01  0.00E+00  0.00E+00 -4.87E-01  0.00E+00  7.77E-03
 SG11
+       ......... ......... ......... ......... ......... ......... ......... ......... ......... ......... ......... .........
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
 ********************                               IMPORTANCE SAMPLING                              ********************
 ********************                   EIGENVALUES OF COR MATRIX OF ESTIMATE (RSR)                  ********************

             1         2         3         4         5         6         7         8
         7.73E-03  6.91E-02  1.87E-01  2.63E-01  7.01E-01  8.31E-01  2.46E+00  3.48E+00
 #TBLN:      2
 #METH: Objective Function Evaluation by Importance Sampling
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
 #TERM:
 EXPECTATION ONLY PROCESS COMPLETED

 ETABAR IS THE ARITHMETIC MEAN OF THE ETA-ESTIMATES,
 AND THE P-VALUE IS GIVEN FOR THE NULL HYPOTHESIS THAT THE TRUE MEAN IS 0.

 ETABAR:         1.2335E-04 -2.4406E-05 -1.6159E-05
 SE:             1.8698E-01  3.9463E-02  3.5879E-02
 N:                      12          12          12

 P VAL.:         9.9947E-01  9.9951E-01  9.9964E-01

 ETASHRINKSD(%)  3.4809E+00  1.7940E+01  1.1767E+01
 ETASHRINKVR(%)  6.8406E+00  3.2662E+01  2.2149E+01
 EBVSHRINKSD(%)  3.5716E+00  1.7875E+01  1.1654E+01
 EBVSHRINKVR(%)  7.0155E+00  3.2555E+01  2.1950E+01
 EPSSHRINKSD(%)  1.1680E+01
 EPSSHRINKVR(%)  2.1996E+01


 TOTAL DATA POINTS NORMALLY DISTRIBUTED (N):          132
 N*LOG(2PI) CONSTANT TO OBJECTIVE FUNCTION:    242.59977276603360
 OBJECTIVE FUNCTION VALUE WITHOUT CONSTANT:    97.381962095653847
 OBJECTIVE FUNCTION VALUE WITH CONSTANT:       339.98173486168741
 REPORTED OBJECTIVE FUNCTION DOES NOT CONTAIN CONSTANT

 TOTAL EFFECTIVE ETAS (NIND*NETA):                            36


 #TERE:
 Elapsed estimation  time in seconds:     2.21
 Elapsed covariance  time in seconds:     3.15

 ********************               OBJECTIVE FUNCTION EVALUATION BY IMPORTANCE SAMPLING             ********************
 #OBJT:**************                        FINAL VALUE OF OBJECTIVE FUNCTION                       ********************
 #OBJV:********************************************       97.382       **************************************************

 ********************               OBJECTIVE FUNCTION EVALUATION BY IMPORTANCE SAMPLING             ********************
 ********************                             FINAL PARAMETER ESTIMATE                           ********************

 THETA - VECTOR OF FIXED EFFECTS PARAMETERS   *********
         TH 1      TH 2      TH 3      TH 4      TH 5
         4.15E-01 -2.44E+00 -7.73E-01  2.62E-01  1.33E-01

 OMEGA - COV MATRIX FOR RANDOM EFFECTS - ETAS  ********
         ETA1      ETA2      ETA3
 ETA1
+        4.91E-01
 ETA2
+        0.00E+00  3.03E-02
 ETA3
+        0.00E+00  0.00E+00  2.16E-02

 SIGMA - COV MATRIX FOR RANDOM EFFECTS - EPSILONS  ****
         EPS1
 EPS1
+        1.00E+00

 OMEGA - CORR MATRIX FOR RANDOM EFFECTS - ETAS  *******
         ETA1      ETA2      ETA3
 ETA1
+        7.01E-01
 ETA2
+        0.00E+00  1.74E-01
 ETA3
+        0.00E+00  0.00E+00  1.47E-01

 SIGMA - CORR MATRIX FOR RANDOM EFFECTS - EPSILONS  ***
         EPS1
 EPS1
+        1.00E+00

 ********************               OBJECTIVE FUNCTION EVALUATION BY IMPORTANCE SAMPLING             ********************
 ********************                         STANDARD ERROR OF ESTIMATE (RSR)                       ********************

 THETA - VECTOR OF FIXED EFFECTS PARAMETERS   *********
         TH 1      TH 2      TH 3      TH 4      TH 5
         2.02E-01  4.69E-02  4.26E-02  1.44E-01  3.52E-02

 OMEGA - COV MATRIX FOR RANDOM EFFECTS - ETAS  ********
         ETA1      ETA2      ETA3
 ETA1
+        2.49E-01
 ETA2
+        0.00E+00  1.15E-02
 ETA3
+        0.00E+00  0.00E+00  7.91E-03

 SIGMA - COV MATRIX FOR RANDOM EFFECTS - EPSILONS  ****
         EPS1
 EPS1
+        0.00E+00

 OMEGA - CORR MATRIX FOR RANDOM EFFECTS - ETAS  *******
         ETA1      ETA2      ETA3
 ETA1
+        1.77E-01
 ETA2
+       .........  3.31E-02
 ETA3
+       ......... .........  2.69E-02

 SIGMA - CORR MATRIX FOR RANDOM EFFECTS - EPSILONS  ***
         EPS1
 EPS1
+       .........

 ********************               OBJECTIVE FUNCTION EVALUATION BY IMPORTANCE SAMPLING             ********************
 ********************                       COVARIANCE MATRIX OF ESTIMATE (RSR)                      ********************

            TH 1      TH 2      TH 3      TH 4      TH 5      OM11      OM12      OM13      OM22      OM23      OM33      SG11
 TH 1
+        4.06E-02
 TH 2
+       -1.67E-03  2.20E-03
 TH 3
+       -9.87E-05  8.77E-04  1.81E-03
 TH 4
+       -3.73E-03 -5.00E-03 -3.54E-03  2.07E-02
 TH 5
+       -2.86E-05  1.03E-03  5.55E-04 -4.22E-03  1.24E-03
 OM11
+        3.00E-02  4.73E-04 -2.11E-03 -5.17E-03 -1.05E-03  6.18E-02
 OM12
+       ......... ......... ......... ......... ......... ......... .........
 OM13
+       ......... ......... ......... ......... ......... ......... ......... .........
 OM22
+       -5.61E-04 -3.50E-04 -2.13E-04  1.28E-03 -1.50E-04 -1.59E-03  0.00E+00  0.00E+00  1.33E-04
 OM23
+       ......... ......... ......... ......... ......... ......... ......... ......... ......... .........
 OM33
+        1.05E-03  3.01E-05  9.24E-05 -1.72E-04 -2.63E-05  1.43E-03  0.00E+00  0.00E+00 -4.70E-05  0.00E+00  6.26E-05
 SG11
+       ......... ......... ......... ......... ......... ......... ......... ......... ......... ......... ......... .........

 ********************               OBJECTIVE FUNCTION EVALUATION BY IMPORTANCE SAMPLING             ********************
 ********************                       CORRELATION MATRIX OF ESTIMATE (RSR)                     ********************

            TH 1      TH 2      TH 3      TH 4      TH 5      OM11      OM12      OM13      OM22      OM23      OM33      SG11
 TH 1
+        2.02E-01
 TH 2
+       -1.77E-01  4.69E-02
 TH 3
+       -1.15E-02  4.40E-01  4.26E-02
 TH 4
+       -1.29E-01 -7.41E-01 -5.77E-01  1.44E-01
 TH 5
+       -4.03E-03  6.22E-01  3.70E-01 -8.33E-01  3.52E-02
 OM11
+        5.98E-01  4.06E-02 -2.00E-01 -1.45E-01 -1.20E-01  2.49E-01
 OM12
+       ......... ......... ......... ......... ......... ......... .........
 OM13
+       ......... ......... ......... ......... ......... ......... ......... .........
 OM22
+       -2.42E-01 -6.48E-01 -4.34E-01  7.70E-01 -3.69E-01 -5.54E-01  0.00E+00  0.00E+00  1.15E-02
 OM23
+       ......... ......... ......... ......... ......... ......... ......... ......... ......... .........
 OM33
+        6.59E-01  8.11E-02  2.74E-01 -1.52E-01 -9.46E-02  7.25E-01  0.00E+00  0.00E+00 -5.16E-01  0.00E+00  7.91E-03
 SG11
+       ......... ......... ......... ......... ......... ......... ......... ......... ......... ......... ......... .........
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
 ********************               OBJECTIVE FUNCTION EVALUATION BY IMPORTANCE SAMPLING             ********************
 ********************                   EIGENVALUES OF COR MATRIX OF ESTIMATE (RSR)                  ********************

             1         2         3         4         5         6         7         8
         8.33E-03  6.86E-02  1.87E-01  2.56E-01  6.99E-01  8.25E-01  2.42E+00  3.54E+00
 Elapsed postprocess time in seconds:     0.06
 Elapsed finaloutput time in seconds:     0.01
 #CPUT: Total CPU Time in Seconds,       14.938
